// SBML level 3 version 2

model biocrnpyler_927492()
  // model units - substance: mole, time: second, volume: litre, area: square_metre, length: metre, extent: mole

  // Compartments:
  compartment default = 1e-6;

  // Species:
  species dna_dna_BASIC_SEVA_26_forward_dna_Terminator1_forward_dna_TetR_RiboA_forward_dna_UTR1_RBS2_forward_dna_LacI_forward_dna_UTR2_RBS2_forward_dna_sfGFP_forward_dna_Terminator2_forward_dna_LacI_RiboB_forward_dna_UTR3_RBS2_forward_dna_TetR_forward_circular_ in default = 0;
  species ordered_polymer_dna_BASIC_SEVA_26_forward_dna_Terminator1_forward_complex_dna_TetR_RiboA_protein_tetR_2x_forward__dna_UTR1_RBS2_forward_dna_LacI_forward_dna_UTR2_RBS2_forward_dna_sfGFP_forward_dna_Terminator2_forward_dna_LacI_RiboB_forward_dna_UTR3_RBS2_forward_dna_TetR_forward_circular_ in default = 0;
  species rna_rna_UTR3_RBS2_forward_rna_TetR_forward_rna_BASIC_SEVA_26_forward_rna_Terminator1_forward_ in default = 0;
  species protein_lacR in default = 0;
  species ordered_polymer_dna_BASIC_SEVA_26_forward_dna_Terminator1_forward_complex_dna_TetR_RiboA_protein_tetR_2x_forward__dna_UTR1_RBS2_forward_dna_LacI_forward_dna_UTR2_RBS2_forward_dna_sfGFP_forward_dna_Terminator2_forward_complex_dna_LacI_RiboB_protein_lacR_2x_forward__dna_UTR3_RBS2_forward_dna_TetR_forward_circular_ in default = 0;
  species ordered_polymer_dna_BASIC_SEVA_26_forward_dna_Terminator1_forward_dna_TetR_RiboA_forward_dna_UTR1_RBS2_forward_dna_LacI_forward_dna_UTR2_RBS2_forward_dna_sfGFP_forward_dna_Terminator2_forward_complex_dna_LacI_RiboB_protein_lacR_2x_forward__dna_UTR3_RBS2_forward_dna_TetR_forward_circular_ in default = 0;
  species rna_rna_UTR1_RBS2_forward_rna_LacI_forward_rna_UTR2_RBS2_forward_rna_sfGFP_forward_rna_Terminator2_forward_ in default = 0;
  species protein_tetR in default = 0;
  species protein_sfGFP in default = 0;

  // Parameters:
  ktx_LacI_RiboB_leak_ = 1;
  kb_LacI_RiboB_lacR_ = 500;
  ku_LacI_RiboB_lacR_ = 1;
  ktx_LacI_RiboB_lacR_ = 0.0001;
  ktx_TetR_RiboA_leak_ = 1;
  kb_TetR_RiboA_tetR_ = 500;
  ku_TetR_RiboA_tetR_ = 1;
  ktx_TetR_RiboA_tetR_ = 0.0001;
  ktl_UTR1_RBS2_simple_translation = 0.075;
  ktl_UTR2_RBS2_simple_translation = 0.075;
  ktl_UTR3_RBS2_simple_translation = 0.075;
  kdil__ = 0.001;
  kdil__rna_degredation = 0.001;

  // Reactions:
  r0: ordered_polymer_dna_BASIC_SEVA_26_forward_dna_Terminator1_forward_complex_dna_TetR_RiboA_protein_tetR_2x_forward__dna_UTR1_RBS2_forward_dna_LacI_forward_dna_UTR2_RBS2_forward_dna_sfGFP_forward_dna_Terminator2_forward_dna_LacI_RiboB_forward_dna_UTR3_RBS2_forward_dna_TetR_forward_circular_ => ordered_polymer_dna_BASIC_SEVA_26_forward_dna_Terminator1_forward_complex_dna_TetR_RiboA_protein_tetR_2x_forward__dna_UTR1_RBS2_forward_dna_LacI_forward_dna_UTR2_RBS2_forward_dna_sfGFP_forward_dna_Terminator2_forward_dna_LacI_RiboB_forward_dna_UTR3_RBS2_forward_dna_TetR_forward_circular_ + rna_rna_UTR3_RBS2_forward_rna_TetR_forward_rna_BASIC_SEVA_26_forward_rna_Terminator1_forward_; ktx_LacI_RiboB_leak_*ordered_polymer_dna_BASIC_SEVA_26_forward_dna_Terminator1_forward_complex_dna_TetR_RiboA_protein_tetR_2x_forward__dna_UTR1_RBS2_forward_dna_LacI_forward_dna_UTR2_RBS2_forward_dna_sfGFP_forward_dna_Terminator2_forward_dna_LacI_RiboB_forward_dna_UTR3_RBS2_forward_dna_TetR_forward_circular_;
  r1: 2 protein_lacR + ordered_polymer_dna_BASIC_SEVA_26_forward_dna_Terminator1_forward_complex_dna_TetR_RiboA_protein_tetR_2x_forward__dna_UTR1_RBS2_forward_dna_LacI_forward_dna_UTR2_RBS2_forward_dna_sfGFP_forward_dna_Terminator2_forward_dna_LacI_RiboB_forward_dna_UTR3_RBS2_forward_dna_TetR_forward_circular_ => ordered_polymer_dna_BASIC_SEVA_26_forward_dna_Terminator1_forward_complex_dna_TetR_RiboA_protein_tetR_2x_forward__dna_UTR1_RBS2_forward_dna_LacI_forward_dna_UTR2_RBS2_forward_dna_sfGFP_forward_dna_Terminator2_forward_complex_dna_LacI_RiboB_protein_lacR_2x_forward__dna_UTR3_RBS2_forward_dna_TetR_forward_circular_; kb_LacI_RiboB_lacR_*protein_lacR^2*ordered_polymer_dna_BASIC_SEVA_26_forward_dna_Terminator1_forward_complex_dna_TetR_RiboA_protein_tetR_2x_forward__dna_UTR1_RBS2_forward_dna_LacI_forward_dna_UTR2_RBS2_forward_dna_sfGFP_forward_dna_Terminator2_forward_dna_LacI_RiboB_forward_dna_UTR3_RBS2_forward_dna_TetR_forward_circular_;
  r1rev: ordered_polymer_dna_BASIC_SEVA_26_forward_dna_Terminator1_forward_complex_dna_TetR_RiboA_protein_tetR_2x_forward__dna_UTR1_RBS2_forward_dna_LacI_forward_dna_UTR2_RBS2_forward_dna_sfGFP_forward_dna_Terminator2_forward_complex_dna_LacI_RiboB_protein_lacR_2x_forward__dna_UTR3_RBS2_forward_dna_TetR_forward_circular_ => 2 protein_lacR + ordered_polymer_dna_BASIC_SEVA_26_forward_dna_Terminator1_forward_complex_dna_TetR_RiboA_protein_tetR_2x_forward__dna_UTR1_RBS2_forward_dna_LacI_forward_dna_UTR2_RBS2_forward_dna_sfGFP_forward_dna_Terminator2_forward_dna_LacI_RiboB_forward_dna_UTR3_RBS2_forward_dna_TetR_forward_circular_; ku_LacI_RiboB_lacR_*ordered_polymer_dna_BASIC_SEVA_26_forward_dna_Terminator1_forward_complex_dna_TetR_RiboA_protein_tetR_2x_forward__dna_UTR1_RBS2_forward_dna_LacI_forward_dna_UTR2_RBS2_forward_dna_sfGFP_forward_dna_Terminator2_forward_complex_dna_LacI_RiboB_protein_lacR_2x_forward__dna_UTR3_RBS2_forward_dna_TetR_forward_circular_;
  r2: ordered_polymer_dna_BASIC_SEVA_26_forward_dna_Terminator1_forward_complex_dna_TetR_RiboA_protein_tetR_2x_forward__dna_UTR1_RBS2_forward_dna_LacI_forward_dna_UTR2_RBS2_forward_dna_sfGFP_forward_dna_Terminator2_forward_complex_dna_LacI_RiboB_protein_lacR_2x_forward__dna_UTR3_RBS2_forward_dna_TetR_forward_circular_ => ordered_polymer_dna_BASIC_SEVA_26_forward_dna_Terminator1_forward_complex_dna_TetR_RiboA_protein_tetR_2x_forward__dna_UTR1_RBS2_forward_dna_LacI_forward_dna_UTR2_RBS2_forward_dna_sfGFP_forward_dna_Terminator2_forward_complex_dna_LacI_RiboB_protein_lacR_2x_forward__dna_UTR3_RBS2_forward_dna_TetR_forward_circular_ + rna_rna_UTR3_RBS2_forward_rna_TetR_forward_rna_BASIC_SEVA_26_forward_rna_Terminator1_forward_; ktx_LacI_RiboB_lacR_*ordered_polymer_dna_BASIC_SEVA_26_forward_dna_Terminator1_forward_complex_dna_TetR_RiboA_protein_tetR_2x_forward__dna_UTR1_RBS2_forward_dna_LacI_forward_dna_UTR2_RBS2_forward_dna_sfGFP_forward_dna_Terminator2_forward_complex_dna_LacI_RiboB_protein_lacR_2x_forward__dna_UTR3_RBS2_forward_dna_TetR_forward_circular_;
  r3: ordered_polymer_dna_BASIC_SEVA_26_forward_dna_Terminator1_forward_dna_TetR_RiboA_forward_dna_UTR1_RBS2_forward_dna_LacI_forward_dna_UTR2_RBS2_forward_dna_sfGFP_forward_dna_Terminator2_forward_complex_dna_LacI_RiboB_protein_lacR_2x_forward__dna_UTR3_RBS2_forward_dna_TetR_forward_circular_ => ordered_polymer_dna_BASIC_SEVA_26_forward_dna_Terminator1_forward_dna_TetR_RiboA_forward_dna_UTR1_RBS2_forward_dna_LacI_forward_dna_UTR2_RBS2_forward_dna_sfGFP_forward_dna_Terminator2_forward_complex_dna_LacI_RiboB_protein_lacR_2x_forward__dna_UTR3_RBS2_forward_dna_TetR_forward_circular_ + rna_rna_UTR1_RBS2_forward_rna_LacI_forward_rna_UTR2_RBS2_forward_rna_sfGFP_forward_rna_Terminator2_forward_; ktx_TetR_RiboA_leak_*ordered_polymer_dna_BASIC_SEVA_26_forward_dna_Terminator1_forward_dna_TetR_RiboA_forward_dna_UTR1_RBS2_forward_dna_LacI_forward_dna_UTR2_RBS2_forward_dna_sfGFP_forward_dna_Terminator2_forward_complex_dna_LacI_RiboB_protein_lacR_2x_forward__dna_UTR3_RBS2_forward_dna_TetR_forward_circular_;
  r4: 2 protein_tetR + ordered_polymer_dna_BASIC_SEVA_26_forward_dna_Terminator1_forward_dna_TetR_RiboA_forward_dna_UTR1_RBS2_forward_dna_LacI_forward_dna_UTR2_RBS2_forward_dna_sfGFP_forward_dna_Terminator2_forward_complex_dna_LacI_RiboB_protein_lacR_2x_forward__dna_UTR3_RBS2_forward_dna_TetR_forward_circular_ => ordered_polymer_dna_BASIC_SEVA_26_forward_dna_Terminator1_forward_complex_dna_TetR_RiboA_protein_tetR_2x_forward__dna_UTR1_RBS2_forward_dna_LacI_forward_dna_UTR2_RBS2_forward_dna_sfGFP_forward_dna_Terminator2_forward_complex_dna_LacI_RiboB_protein_lacR_2x_forward__dna_UTR3_RBS2_forward_dna_TetR_forward_circular_; kb_TetR_RiboA_tetR_*protein_tetR^2*ordered_polymer_dna_BASIC_SEVA_26_forward_dna_Terminator1_forward_dna_TetR_RiboA_forward_dna_UTR1_RBS2_forward_dna_LacI_forward_dna_UTR2_RBS2_forward_dna_sfGFP_forward_dna_Terminator2_forward_complex_dna_LacI_RiboB_protein_lacR_2x_forward__dna_UTR3_RBS2_forward_dna_TetR_forward_circular_;
  r4rev: ordered_polymer_dna_BASIC_SEVA_26_forward_dna_Terminator1_forward_complex_dna_TetR_RiboA_protein_tetR_2x_forward__dna_UTR1_RBS2_forward_dna_LacI_forward_dna_UTR2_RBS2_forward_dna_sfGFP_forward_dna_Terminator2_forward_complex_dna_LacI_RiboB_protein_lacR_2x_forward__dna_UTR3_RBS2_forward_dna_TetR_forward_circular_ => 2 protein_tetR + ordered_polymer_dna_BASIC_SEVA_26_forward_dna_Terminator1_forward_dna_TetR_RiboA_forward_dna_UTR1_RBS2_forward_dna_LacI_forward_dna_UTR2_RBS2_forward_dna_sfGFP_forward_dna_Terminator2_forward_complex_dna_LacI_RiboB_protein_lacR_2x_forward__dna_UTR3_RBS2_forward_dna_TetR_forward_circular_; ku_TetR_RiboA_tetR_*ordered_polymer_dna_BASIC_SEVA_26_forward_dna_Terminator1_forward_complex_dna_TetR_RiboA_protein_tetR_2x_forward__dna_UTR1_RBS2_forward_dna_LacI_forward_dna_UTR2_RBS2_forward_dna_sfGFP_forward_dna_Terminator2_forward_complex_dna_LacI_RiboB_protein_lacR_2x_forward__dna_UTR3_RBS2_forward_dna_TetR_forward_circular_;
  r5: ordered_polymer_dna_BASIC_SEVA_26_forward_dna_Terminator1_forward_complex_dna_TetR_RiboA_protein_tetR_2x_forward__dna_UTR1_RBS2_forward_dna_LacI_forward_dna_UTR2_RBS2_forward_dna_sfGFP_forward_dna_Terminator2_forward_complex_dna_LacI_RiboB_protein_lacR_2x_forward__dna_UTR3_RBS2_forward_dna_TetR_forward_circular_ => ordered_polymer_dna_BASIC_SEVA_26_forward_dna_Terminator1_forward_complex_dna_TetR_RiboA_protein_tetR_2x_forward__dna_UTR1_RBS2_forward_dna_LacI_forward_dna_UTR2_RBS2_forward_dna_sfGFP_forward_dna_Terminator2_forward_complex_dna_LacI_RiboB_protein_lacR_2x_forward__dna_UTR3_RBS2_forward_dna_TetR_forward_circular_ + rna_rna_UTR1_RBS2_forward_rna_LacI_forward_rna_UTR2_RBS2_forward_rna_sfGFP_forward_rna_Terminator2_forward_; ktx_TetR_RiboA_tetR_*ordered_polymer_dna_BASIC_SEVA_26_forward_dna_Terminator1_forward_complex_dna_TetR_RiboA_protein_tetR_2x_forward__dna_UTR1_RBS2_forward_dna_LacI_forward_dna_UTR2_RBS2_forward_dna_sfGFP_forward_dna_Terminator2_forward_complex_dna_LacI_RiboB_protein_lacR_2x_forward__dna_UTR3_RBS2_forward_dna_TetR_forward_circular_;
  r6: dna_dna_BASIC_SEVA_26_forward_dna_Terminator1_forward_dna_TetR_RiboA_forward_dna_UTR1_RBS2_forward_dna_LacI_forward_dna_UTR2_RBS2_forward_dna_sfGFP_forward_dna_Terminator2_forward_dna_LacI_RiboB_forward_dna_UTR3_RBS2_forward_dna_TetR_forward_circular_ => dna_dna_BASIC_SEVA_26_forward_dna_Terminator1_forward_dna_TetR_RiboA_forward_dna_UTR1_RBS2_forward_dna_LacI_forward_dna_UTR2_RBS2_forward_dna_sfGFP_forward_dna_Terminator2_forward_dna_LacI_RiboB_forward_dna_UTR3_RBS2_forward_dna_TetR_forward_circular_ + rna_rna_UTR1_RBS2_forward_rna_LacI_forward_rna_UTR2_RBS2_forward_rna_sfGFP_forward_rna_Terminator2_forward_; ktx_TetR_RiboA_leak_*dna_dna_BASIC_SEVA_26_forward_dna_Terminator1_forward_dna_TetR_RiboA_forward_dna_UTR1_RBS2_forward_dna_LacI_forward_dna_UTR2_RBS2_forward_dna_sfGFP_forward_dna_Terminator2_forward_dna_LacI_RiboB_forward_dna_UTR3_RBS2_forward_dna_TetR_forward_circular_;
  r7: 2 protein_tetR + dna_dna_BASIC_SEVA_26_forward_dna_Terminator1_forward_dna_TetR_RiboA_forward_dna_UTR1_RBS2_forward_dna_LacI_forward_dna_UTR2_RBS2_forward_dna_sfGFP_forward_dna_Terminator2_forward_dna_LacI_RiboB_forward_dna_UTR3_RBS2_forward_dna_TetR_forward_circular_ => ordered_polymer_dna_BASIC_SEVA_26_forward_dna_Terminator1_forward_complex_dna_TetR_RiboA_protein_tetR_2x_forward__dna_UTR1_RBS2_forward_dna_LacI_forward_dna_UTR2_RBS2_forward_dna_sfGFP_forward_dna_Terminator2_forward_dna_LacI_RiboB_forward_dna_UTR3_RBS2_forward_dna_TetR_forward_circular_; kb_TetR_RiboA_tetR_*protein_tetR^2*dna_dna_BASIC_SEVA_26_forward_dna_Terminator1_forward_dna_TetR_RiboA_forward_dna_UTR1_RBS2_forward_dna_LacI_forward_dna_UTR2_RBS2_forward_dna_sfGFP_forward_dna_Terminator2_forward_dna_LacI_RiboB_forward_dna_UTR3_RBS2_forward_dna_TetR_forward_circular_;
  r7rev: ordered_polymer_dna_BASIC_SEVA_26_forward_dna_Terminator1_forward_complex_dna_TetR_RiboA_protein_tetR_2x_forward__dna_UTR1_RBS2_forward_dna_LacI_forward_dna_UTR2_RBS2_forward_dna_sfGFP_forward_dna_Terminator2_forward_dna_LacI_RiboB_forward_dna_UTR3_RBS2_forward_dna_TetR_forward_circular_ => 2 protein_tetR + dna_dna_BASIC_SEVA_26_forward_dna_Terminator1_forward_dna_TetR_RiboA_forward_dna_UTR1_RBS2_forward_dna_LacI_forward_dna_UTR2_RBS2_forward_dna_sfGFP_forward_dna_Terminator2_forward_dna_LacI_RiboB_forward_dna_UTR3_RBS2_forward_dna_TetR_forward_circular_; ku_TetR_RiboA_tetR_*ordered_polymer_dna_BASIC_SEVA_26_forward_dna_Terminator1_forward_complex_dna_TetR_RiboA_protein_tetR_2x_forward__dna_UTR1_RBS2_forward_dna_LacI_forward_dna_UTR2_RBS2_forward_dna_sfGFP_forward_dna_Terminator2_forward_dna_LacI_RiboB_forward_dna_UTR3_RBS2_forward_dna_TetR_forward_circular_;
  r8: ordered_polymer_dna_BASIC_SEVA_26_forward_dna_Terminator1_forward_complex_dna_TetR_RiboA_protein_tetR_2x_forward__dna_UTR1_RBS2_forward_dna_LacI_forward_dna_UTR2_RBS2_forward_dna_sfGFP_forward_dna_Terminator2_forward_dna_LacI_RiboB_forward_dna_UTR3_RBS2_forward_dna_TetR_forward_circular_ => ordered_polymer_dna_BASIC_SEVA_26_forward_dna_Terminator1_forward_complex_dna_TetR_RiboA_protein_tetR_2x_forward__dna_UTR1_RBS2_forward_dna_LacI_forward_dna_UTR2_RBS2_forward_dna_sfGFP_forward_dna_Terminator2_forward_dna_LacI_RiboB_forward_dna_UTR3_RBS2_forward_dna_TetR_forward_circular_ + rna_rna_UTR1_RBS2_forward_rna_LacI_forward_rna_UTR2_RBS2_forward_rna_sfGFP_forward_rna_Terminator2_forward_; ktx_TetR_RiboA_tetR_*ordered_polymer_dna_BASIC_SEVA_26_forward_dna_Terminator1_forward_complex_dna_TetR_RiboA_protein_tetR_2x_forward__dna_UTR1_RBS2_forward_dna_LacI_forward_dna_UTR2_RBS2_forward_dna_sfGFP_forward_dna_Terminator2_forward_dna_LacI_RiboB_forward_dna_UTR3_RBS2_forward_dna_TetR_forward_circular_;
  r9: dna_dna_BASIC_SEVA_26_forward_dna_Terminator1_forward_dna_TetR_RiboA_forward_dna_UTR1_RBS2_forward_dna_LacI_forward_dna_UTR2_RBS2_forward_dna_sfGFP_forward_dna_Terminator2_forward_dna_LacI_RiboB_forward_dna_UTR3_RBS2_forward_dna_TetR_forward_circular_ => dna_dna_BASIC_SEVA_26_forward_dna_Terminator1_forward_dna_TetR_RiboA_forward_dna_UTR1_RBS2_forward_dna_LacI_forward_dna_UTR2_RBS2_forward_dna_sfGFP_forward_dna_Terminator2_forward_dna_LacI_RiboB_forward_dna_UTR3_RBS2_forward_dna_TetR_forward_circular_ + rna_rna_UTR3_RBS2_forward_rna_TetR_forward_rna_BASIC_SEVA_26_forward_rna_Terminator1_forward_; ktx_LacI_RiboB_leak_*dna_dna_BASIC_SEVA_26_forward_dna_Terminator1_forward_dna_TetR_RiboA_forward_dna_UTR1_RBS2_forward_dna_LacI_forward_dna_UTR2_RBS2_forward_dna_sfGFP_forward_dna_Terminator2_forward_dna_LacI_RiboB_forward_dna_UTR3_RBS2_forward_dna_TetR_forward_circular_;
  r10: 2 protein_lacR + dna_dna_BASIC_SEVA_26_forward_dna_Terminator1_forward_dna_TetR_RiboA_forward_dna_UTR1_RBS2_forward_dna_LacI_forward_dna_UTR2_RBS2_forward_dna_sfGFP_forward_dna_Terminator2_forward_dna_LacI_RiboB_forward_dna_UTR3_RBS2_forward_dna_TetR_forward_circular_ => ordered_polymer_dna_BASIC_SEVA_26_forward_dna_Terminator1_forward_dna_TetR_RiboA_forward_dna_UTR1_RBS2_forward_dna_LacI_forward_dna_UTR2_RBS2_forward_dna_sfGFP_forward_dna_Terminator2_forward_complex_dna_LacI_RiboB_protein_lacR_2x_forward__dna_UTR3_RBS2_forward_dna_TetR_forward_circular_; kb_LacI_RiboB_lacR_*protein_lacR^2*dna_dna_BASIC_SEVA_26_forward_dna_Terminator1_forward_dna_TetR_RiboA_forward_dna_UTR1_RBS2_forward_dna_LacI_forward_dna_UTR2_RBS2_forward_dna_sfGFP_forward_dna_Terminator2_forward_dna_LacI_RiboB_forward_dna_UTR3_RBS2_forward_dna_TetR_forward_circular_;
  r10rev: ordered_polymer_dna_BASIC_SEVA_26_forward_dna_Terminator1_forward_dna_TetR_RiboA_forward_dna_UTR1_RBS2_forward_dna_LacI_forward_dna_UTR2_RBS2_forward_dna_sfGFP_forward_dna_Terminator2_forward_complex_dna_LacI_RiboB_protein_lacR_2x_forward__dna_UTR3_RBS2_forward_dna_TetR_forward_circular_ => 2 protein_lacR + dna_dna_BASIC_SEVA_26_forward_dna_Terminator1_forward_dna_TetR_RiboA_forward_dna_UTR1_RBS2_forward_dna_LacI_forward_dna_UTR2_RBS2_forward_dna_sfGFP_forward_dna_Terminator2_forward_dna_LacI_RiboB_forward_dna_UTR3_RBS2_forward_dna_TetR_forward_circular_; ku_LacI_RiboB_lacR_*ordered_polymer_dna_BASIC_SEVA_26_forward_dna_Terminator1_forward_dna_TetR_RiboA_forward_dna_UTR1_RBS2_forward_dna_LacI_forward_dna_UTR2_RBS2_forward_dna_sfGFP_forward_dna_Terminator2_forward_complex_dna_LacI_RiboB_protein_lacR_2x_forward__dna_UTR3_RBS2_forward_dna_TetR_forward_circular_;
  r11: ordered_polymer_dna_BASIC_SEVA_26_forward_dna_Terminator1_forward_dna_TetR_RiboA_forward_dna_UTR1_RBS2_forward_dna_LacI_forward_dna_UTR2_RBS2_forward_dna_sfGFP_forward_dna_Terminator2_forward_complex_dna_LacI_RiboB_protein_lacR_2x_forward__dna_UTR3_RBS2_forward_dna_TetR_forward_circular_ => ordered_polymer_dna_BASIC_SEVA_26_forward_dna_Terminator1_forward_dna_TetR_RiboA_forward_dna_UTR1_RBS2_forward_dna_LacI_forward_dna_UTR2_RBS2_forward_dna_sfGFP_forward_dna_Terminator2_forward_complex_dna_LacI_RiboB_protein_lacR_2x_forward__dna_UTR3_RBS2_forward_dna_TetR_forward_circular_ + rna_rna_UTR3_RBS2_forward_rna_TetR_forward_rna_BASIC_SEVA_26_forward_rna_Terminator1_forward_; ktx_LacI_RiboB_lacR_*ordered_polymer_dna_BASIC_SEVA_26_forward_dna_Terminator1_forward_dna_TetR_RiboA_forward_dna_UTR1_RBS2_forward_dna_LacI_forward_dna_UTR2_RBS2_forward_dna_sfGFP_forward_dna_Terminator2_forward_complex_dna_LacI_RiboB_protein_lacR_2x_forward__dna_UTR3_RBS2_forward_dna_TetR_forward_circular_;
  r12: rna_rna_UTR1_RBS2_forward_rna_LacI_forward_rna_UTR2_RBS2_forward_rna_sfGFP_forward_rna_Terminator2_forward_ => rna_rna_UTR1_RBS2_forward_rna_LacI_forward_rna_UTR2_RBS2_forward_rna_sfGFP_forward_rna_Terminator2_forward_ + protein_lacR; ktl_UTR1_RBS2_simple_translation*rna_rna_UTR1_RBS2_forward_rna_LacI_forward_rna_UTR2_RBS2_forward_rna_sfGFP_forward_rna_Terminator2_forward_;
  r13: rna_rna_UTR1_RBS2_forward_rna_LacI_forward_rna_UTR2_RBS2_forward_rna_sfGFP_forward_rna_Terminator2_forward_ => rna_rna_UTR1_RBS2_forward_rna_LacI_forward_rna_UTR2_RBS2_forward_rna_sfGFP_forward_rna_Terminator2_forward_ + protein_sfGFP; ktl_UTR2_RBS2_simple_translation*rna_rna_UTR1_RBS2_forward_rna_LacI_forward_rna_UTR2_RBS2_forward_rna_sfGFP_forward_rna_Terminator2_forward_;
  r14: rna_rna_UTR3_RBS2_forward_rna_TetR_forward_rna_BASIC_SEVA_26_forward_rna_Terminator1_forward_ => rna_rna_UTR3_RBS2_forward_rna_TetR_forward_rna_BASIC_SEVA_26_forward_rna_Terminator1_forward_ + protein_tetR; ktl_UTR3_RBS2_simple_translation*rna_rna_UTR3_RBS2_forward_rna_TetR_forward_rna_BASIC_SEVA_26_forward_rna_Terminator1_forward_;
  r15: rna_rna_UTR3_RBS2_forward_rna_TetR_forward_rna_BASIC_SEVA_26_forward_rna_Terminator1_forward_ => ; kdil__*rna_rna_UTR3_RBS2_forward_rna_TetR_forward_rna_BASIC_SEVA_26_forward_rna_Terminator1_forward_;
  r16: protein_lacR => ; kdil__*protein_lacR;
  r17: rna_rna_UTR1_RBS2_forward_rna_LacI_forward_rna_UTR2_RBS2_forward_rna_sfGFP_forward_rna_Terminator2_forward_ => ; kdil__*rna_rna_UTR1_RBS2_forward_rna_LacI_forward_rna_UTR2_RBS2_forward_rna_sfGFP_forward_rna_Terminator2_forward_;
  r18: protein_tetR => ; kdil__*protein_tetR;
  r19: protein_sfGFP => ; kdil__*protein_sfGFP;
  r20: rna_rna_UTR3_RBS2_forward_rna_TetR_forward_rna_BASIC_SEVA_26_forward_rna_Terminator1_forward_ => ; kdil__rna_degredation*rna_rna_UTR3_RBS2_forward_rna_TetR_forward_rna_BASIC_SEVA_26_forward_rna_Terminator1_forward_;
  r21: rna_rna_UTR1_RBS2_forward_rna_LacI_forward_rna_UTR2_RBS2_forward_rna_sfGFP_forward_rna_Terminator2_forward_ => ; kdil__rna_degredation*rna_rna_UTR1_RBS2_forward_rna_LacI_forward_rna_UTR2_RBS2_forward_rna_sfGFP_forward_rna_Terminator2_forward_;

  // Unit definitions:
  unit square_metre = metre^2;
end
